K1 := 1.4
Gv := 14
G := Gv*K1 = 19.6
Sh := 0.8*G = 15.68
S := 0.5*G*Sh = 153.664
R := 1300
W := 1.5
t := 1300/1.5 = 866.667
T := t/60 = 14.4444
p := 1.56
Ps1 := 575
Ps2 := 250
M := 71
Vv := 1
tvup1 := p*4*10^5/(Ps1*sqrt(M)*(5.38 + 4.1*Vv)) = 13.5856
tvup1 := p*4*10^5/(Ps2*sqrt(M)*(5.38 + 4.1*Vv)) = 31.2469
