Suk1 := 227
Suk2 := 225
Sod := 0.5
Vod := 1.5
h1 := 2.5
h2 := 2.8
Sdop1 := 40
Sdop2 := 20
Mn1 := Suk1/Sod = 454  # осіб
Mn2 := Suk2/Sod = 450  # осіб  # осіб  # осіб
Mo1 := (Suk1 + Sdop1)*h1/Vod = 445  # осіб
Mo2 := (Suk2 + Sdop2)*h2/Vod = 457.333  # осіб
W1 := 8
W2 := 2
n1 := 3
n2 := 3
V1 := 1200
V2 := 300
Npov11 := n1*V1/W1 = 450
Npov12 := n2*V1/W1 = 450
Npov21 := n1*V2/W2 = 450
Npov22 := n2*V2/W2 = 450
B1 := 3960
B2 := 4000
Bod := 3
T := 3
N1 := B1/(Bod*T) = 440
N2 := B2/(Bod*T) = 444.444
